*Heading
** Job name: Job-1 Model name: Model-1
** Generated by: Abaqus/CAE Student Edition 2018
*Preprint, echo=NO, model=NO, history=NO, contact=NO
**
** PARTS
**
*Part, name=Part-1
*Node
      1,          50.,         100.,           6.
      2,          50.,   94.1176453,           6.
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*Element, type=C3D8R
  1,  37,  38,  56,  55,   1,   2,  20,  19
  2,  38,  39,  57,  56,   2,   3,  21,  20
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*Nset, nset=Set-1, generate
   1,  324,    1
*Elset, elset=Set-1, generate
   1,  136,    1
** Section: Section-1
*Solid Section, elset=Set-1, material=Material-1
,
*End Part
**
*Part, name=Part-2
*End Part
**
**
** ASSEMBLY
**
*Assembly, name=Assembly
**
*Instance, name=Part-1-1, part=Part-1
*End Instance
**
*Instance, name=Part-2-1, part=Part-2
*End Instance
**
*Nset, nset=Set-3, instance=Part-1-1
   1,   2,   3,   4,   5,   6
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*Elset, elset=Set-3, instance=Part-1-1, generate
   1,  136,    1
*Nset, nset=Set-4, instance=Part-1-1, generate
  18,  324,   18
*Elset, elset=Set-4, instance=Part-1-1, generate
  17,  136,   17
*Nset, nset=Set-5, instance=Part-1-1, generate
   1,  307,   18
*Elset, elset=Set-5, instance=Part-1-1, generate
   1,  120,   17
*Nset, nset=_PickedSet6, internal, instance=Part-1-1, generate
   1,  324,    1
*Elset, elset=_PickedSet6, internal, instance=Part-1-1, generate
   1,  136,    1
*Enrichment, name=Crack-1, type=PROPAGATION CRACK, elset=_PickedSet6
*End Assembly
**
** MATERIALS
**
*Material, name=Material-1
*Damage Initiation, criterion=MAXPS
60.,
*Damage Evolution, type=DISPLACEMENT
 0.5,
*Elastic
5000., 0.3
*Initial Conditions, type=ENRICHMENT
Part-1-1.94, 1,Crack-1, -2.94118, -2.5
Part-1-1.94, 2,Crack-1, 2.94118, -2.5
Part-1-1.94, 3,Crack-1, 2.94118, -2.5
Part-1-1.94, 4,Crack-1, -2.94118, -2.5
Part-1-1.94, 5,Crack-1, -2.94118, 3.75
Part-1-1.94, 6,Crack-1, 2.94118, 3.75
Part-1-1.94, 7,Crack-1, 2.94118, 3.75
Part-1-1.94, 8,Crack-1, -2.94118, 3.75
Part-1-1.111, 1,Crack-1, -2.94118
Part-1-1.111, 2,Crack-1, 2.94118
Part-1-1.111, 3,Crack-1, 2.94118
Part-1-1.111, 4,Crack-1, -2.94118
Part-1-1.111, 5,Crack-1, -2.94118
Part-1-1.111, 6,Crack-1, 2.94118
Part-1-1.111, 7,Crack-1, 2.94118
Part-1-1.111, 8,Crack-1, -2.94118
Part-1-1.128, 1,Crack-1, -2.94118
Part-1-1.128, 2,Crack-1, 2.94118
Part-1-1.128, 3,Crack-1, 2.94118
Part-1-1.128, 4,Crack-1, -2.94118
Part-1-1.128, 5,Crack-1, -2.94118
Part-1-1.128, 6,Crack-1, 2.94118
Part-1-1.128, 7,Crack-1, 2.94118
Part-1-1.128, 8,Crack-1, -2.94118
** ----------------------------------------------------------------
**
** STEP: Step-1
**
*Step, name=Step-1, nlgeom=YES
*Static
0.2, 0.2, 2e-10, 0.2
**
** BOUNDARY CONDITIONS
**
** Name: BC-1 Type: Displacement/Rotation
*Boundary
Set-3, 1, 1
Set-3, 3, 3
Set-3, 4, 4
Set-3, 5, 5
Set-3, 6, 6
** Name: BC-2 Type: Displacement/Rotation
*Boundary
Set-4, 1, 1
Set-4, 2, 2
Set-4, 3, 3
Set-4, 4, 4
Set-4, 5, 5
Set-4, 6, 6
** Name: BC-3 Type: Displacement/Rotation
*Boundary
Set-5, 1, 1
Set-5, 2, 2, 3.
Set-5, 3, 3
Set-5, 4, 4
Set-5, 5, 5
Set-5, 6, 6
**
** OUTPUT REQUESTS
**
*Restart, write, frequency=0
**
** FIELD OUTPUT: F-Output-1
**
*Output, field
*Node Output
CF, PHILSM, PSILSM, RF, U
*Element Output, directions=YES
EEQUT, ENER, LE, MVF, PE, PEEQ, PEMAG, S, SEQUT, STATUS, STATUSXFEM, TE, TEEQ, TEVOL
*Contact Output
CDISP, CSTRESS, ENRRT
**
** HISTORY OUTPUT: H-Output-1
**
*Output, history, variable=PRESELECT
*End Step
